# Вариант 6
# Задание1
f(t) := cos(t)*cos(|sin(t)|)
k := 0 .. 3
t := 0, 0.01 .. 2*π
a[k] := 1/π*integral(f(t)*cos(k*t), t = 0 .. 2*π)
b[k] := 1/π*integral(f(t)*sin(k*t), t = 0 .. 2*π)
F1(t) := a[1]*cos(t) + b[1]*sin(t)
F2(t) := a[2]*cos(2*t) + b[2]*sin(2*t)
F3(t) := a[3]*cos(3*t) + b[3]*sin(3*t)
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F(t) := a[0]/2 + sum(a[k]*cos(k*t) + b[k]*sin(k*t), k = 1 .. 3)
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# Задание 2
Ы
A[k] := sqrt(a[k]^2 + b[k]^2)
ϕ[k] := -atan(b[k]/a[k])
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F(t) := -a[0]/2 + sum(A[k]*cos(k*t + ϕ[k]), k = 1 .. 3)
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# Задание 3
i := 0 .. 31
T := 2*π
N := 32
t[i] := i*(T/32)
y[i] := f(t[i])
a[k] := 2/N*sum(y[i]*cos(k*i*T/N), i = 0 .. N - 1)
b[k] := 2/N*sum(y[i]*sin(k*i*T/N), i = 0 .. N - 1)
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k := 0 .. 127
t[k] := k*(T/128)  # Задание 4
v[k] := f(t[k])
i := 0 .. 6
F := fft(v)
A[i] := sqrt(Re(F[i])^2 + Im(F[i])^2)
j := 0 .. 128
ϕ[i] := -arg(F[i])
g[j] := if(j ≤ 6, F[j], 0)
h := ifft(g)
F = [
    -4.10024e-16; 4.9786 + 4.97229e-13i; 1.27686e-17 - 5.36952e-17i; 0.664002 + 8.28138e-14i; 8.33068e-17 + 7.07316e-17i; 0.0141284 - 1.97841e-14i; 7.01569e-17 - 3.843e-17i; 0.000118978 - 6.65508e-14i; 1.49309e-17 + 1.41045e-17i; 5.34496e-7 - 1.81791e-14i
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]
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# Задание 5
f(t) := cos(t)*cos(|sin(t)|)
T := 2*π
t[k] := T/128*k
v[k] := f(t[k])
s[k] := v[k] + rnd(rnd(2) - 1)
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α := 2
f := fft(s)
j := 0 .. 64
g[j] := f[j]*Φ(|f[j]| - α)
h := ifft(g)
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