x := transpose([0, 0.2, 0.4, 0.6])
y := transpose([5, 0, 2, -1])
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c := cspline(x, y)
R(t) := interp(c, x, y, t)
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f(t) := linterp(x, y, t)
t := 0.1, 0.3 .. 0.7
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R(t) = [0.875; 0.875; 1.875; -8.125]
